####################################################################################################
#                                   Twistable elastic polymer                                      #
####################################################################################################

units nano


#--------------------------------------Initial Parameters------------------------------------------#


# Read parameterfile
include parameterfile

# Fixed boundaries in all dimensions
boundary f f f


#-----------------------------------------Define Styles--------------------------------------------#


atom_style     molecular
bond_style     hybrid fene/expand harmonic
angle_style    hybrid cosine harmonic
improper_style harmonic

pair_style     hybrid/overlay lj/cut $(3.5) soft $(3.5)

# Give weighting coef to LJ potentials (0 = turn off) between atoms that are bonded, seperated by 2 and 3 bonds
special_bonds lj 0. 0. 0.

# Only compute interactions between nearby atoms
neighbor $(4*3.5) bin

# Only when multiple processors are used
#comm_modify cutoff/multi 2*7 70


#-------------------------------------------Read Data----------------------------------------------#


read_data datafile


#----------------------------------------Soft pair_coeff-------------------------------------------#

pair_coeff 1 3 soft 0. 0.
pair_coeff 1 5 soft 0. 0.


#---------------------------------------------Fixes------------------------------------------------#


# Group all type 1 molecules as 'DNA' and all other types as 'SMC'
group DNA id 2:$(v_N-1)
group SMC molecule > 1

# DNA Langevin integration (nve + langevin = Brownian dynamics)
fix 1a DNA nve
fix 1b DNA langevin $T $T ${gamma} ${seed}

# SMC is set of rigid bodies, each type of SMC-atom is a rigid body ('rigid molecule'), with Langevin integration
fix 2 SMC rigid molecule langevin $T $T ${gamma} ${seed}

# Stretching force applied to the first and last DNA atom/bead, only in x-direction
#group DNAleft  id 1
#group DNAright id $N
#fix 3a DNAleft  addforce -${force} 0 0
#fix 3b DNAright addforce  ${force} 0 0

# Prevents the system from diffusing away (spring with K=10.0 tethers all atoms to origin)
#fix 4 all spring tether 10.0 0 0 0 0

# For VMD visualisation
dump movie all atom ${output_steps} output.lammpstrj
dump_modify movie sort id pbc yes

# Computes SMC potential energy due to angles and impropers
#compute en all pe angle improper
#variable en equal c_en
#fix 5 all print 1000 "${en}" append "energy.dat"
#compute enDNA DNA pe/atom bond angle
#compute enSMC SMC pe/atom angle improper

#compute enDNAtot DNA reduce sum c_enDNA
#compute enSMCtot SMC reduce sum c_enSMC

#variable enDNA equal c_enDNAtot
#variable enSMC equal c_enSMCtot

#fix 5 all print 1000 "${enDNA} ${enSMC}" append "energy.dat"

# Set integration timestep
timestep ${timestep}


#----------------------------------------------Run-------------------------------------------------#


# Useful variables

variable angle3kappa       equal ${armsStiffness}*${kB}*$T
variable angle3angleATP    equal ${armsAngleATP}
#variable angle3angleAPO    equal 180*acos(${bridgeWidth}/(2*${armLength}))/PI
variable angle3angleAPO1    equal (180/PI)*acos(${bridgeWidth}/${armLength})
variable angle3angleAPO2    equal (180/PI)*acos(2*${bridgeWidth}/${armLength})

variable improper2kappa    equal ${foldingStiffness}*${kB}*$T
variable improper2angleATP equal 180-${foldingAngleATP}
variable improper2angleAPO equal 180-${foldingAngleAPO}

variable improper3kappa    equal ${asymmetryStiffness}*${kB}*$T
variable improper3angleATP equal abs(90-${foldingAngleATP})
variable improper3angleAPO equal abs(90-${foldingAngleAPO})


# Reference point in script (enter loop)
label loop

# Cycle index (looped over)
variable cycle loop ${cycles}


# Equilibrate in the APO-state
run $(v_stepsATP/2)

# ATP-bound state
include states/atp_bound_1
run 10000

include states/atp_bound_2
run $(v_stepsADP-10000)

# ADP-bound state
include states/adp_bound
run $(v_stepsAPO)

# APO state
include states/apo
run $(v_stepsATP/2)

#print "${stepCurrent}" append ${timesfile} screen no

#dump movie all atom ${output_steps} ${outputfile}
#dump_modify movie sort id pbc yes append yes

#run 0

# Exit if done
if "${cycle} >= ${cycles}" then "jump SELF break"

# Increment cycle index
next cycle

# Re-enter loop
jump SELF loop

# Reference point in script (exit loop)
label break


############################################################################################################
