####################################################################################################
#                                   Twistable elastic polymer                                      #
####################################################################################################

units nano


#--------------------------------------Initial Parameters------------------------------------------#


# Read parameterfile
include parameterfile

# Fixed boundaries in all dimensions
boundary f f f


#-----------------------------------------Define Styles--------------------------------------------#


atom_style     molecular
bond_style     hybrid fene/expand harmonic
angle_style    hybrid cosine harmonic
improper_style harmonic

pair_style     hybrid/overlay lj/cut $(3.5) soft $(3.5)

# Give weighting coef to LJ potentials (0 = turn off) between atoms that are bonded, seperated by 2 and 3 bonds
special_bonds lj 0. 0. 0.

# Only compute interactions between nearby atoms
neighbor $(4*3.5) bin

# Only when multiple processors are used
#comm_modify cutoff/multi 2*7 70


#-------------------------------------------Read Data----------------------------------------------#


read_data datafile


#---------------------------------------------Fixes------------------------------------------------#


# Group all type 1 molecules as 'DNA' and all other types as 'SMC'
group DNA molecule ${DNA_mols}
group SMC molecule ${SMC_mols}

# DNA Langevin integration (nve + langevin = Brownian dynamics)
fix 1a DNA nve
fix 1b DNA langevin $T $T ${gamma} ${seed}

# SMC is set of rigid bodies, each type of SMC-atom is a rigid body ('rigid molecule'), with Langevin integration
fix 2 SMC rigid molecule langevin $T $T ${gamma} ${seed}

# Hold end points of DNA in place
group end_points ${dna_end_points}
fix end_points_frz end_points setforce 0 0 0

# Stretching forces

# test values:
# variable stretching_forces_len equal 2
# variable stretching_forces_groups universe "id 1 2" "id 3 4"
# variable stretching_forces universe "1 0 0" "0 0 1"

if $(!is_defined(variable,stretching_forces_len)) then &
	"jump SELF sf_exit"

label sf_enter
variable sfi loop ${stretching_forces_len}

group sf_grp_${sfi} ${stretching_forces_groups}
fix sf_fix_${sfi} sf_grp_${sfi} addforce ${stretching_forces}

next sfi
next stretching_forces_groups stretching_forces
jump SELF sf_enter
label sf_exit

# Prevents the system from diffusing away (spring with K=10.0 tethers all atoms to origin)
#fix 4 all spring tether 10.0 0 0 0 0

# ---OBSTACLE---
# use infinite wall to represent very large particle
if $(is_defined(variable,excluded)) then &
	"group exl_grp ${excluded}" &
	"group repelled_by_wall subtract all exl_grp" &
	"fix obstacle repelled_by_wall wall/lj126 ylo ${wall_y} ${epsilon3} ${sigma} ${sigma}"

# For VMD visualisation
dump movie all custom ${output_steps} output.lammpstrj id type x y z
dump_modify movie sort id pbc yes

# Computes SMC potential energy due to angles and impropers
#compute en all pe angle improper
#variable en equal c_en
#fix 5 all print 1000 "${en}" append "energy.dat"
#compute enDNA DNA pe/atom bond angle
#compute enSMC SMC pe/atom angle improper

#compute enDNAtot DNA reduce sum c_enDNA
#compute enSMCtot SMC reduce sum c_enSMC

#variable enDNA equal c_enDNAtot
#variable enSMC equal c_enSMCtot

#fix 5 all print 1000 "${enDNA} ${enSMC}" append "energy.dat"

# Set integration timestep
timestep ${timestep}


#----------------------------------------------Run-------------------------------------------------#


# EQUILIBRATE

group frozen ${indices}

fix frz frozen setforce 0 0 0

# Equilibrate in the APO-state
run 30000

unfix frz

# collect msd for obstacle
if $(is_defined(variable,obstacle_id)) then &
	"group obst_group id ${obstacle_id}" &
	"dump obst_dump obst_group custom ${output_steps} obstacle.lammpstrj id type x y z" &
	"dump_modify obst_dump pbc yes"

# apply force to smc
if $(is_defined(variable,smc_force)) then &
	"fix smc_force SMC addforce $(-v_smc_force) $(v_smc_force) 0"

# Reference point in script (enter loop)
label main_loop

# Cycle index (looped over)
variable cycle loop ${cycles}

# ATP-bound state
include states/atp_bound_1
run $(round(-10000*ln(random(0,1,v_seed))))

include states/atp_bound_2
run $(round(-(v_stepsADP-10000)*ln(random(0,1,v_seed))))

# ADP-bound state
include states/adp_bound
run $(round(-v_stepsAPO*ln(random(0,1,v_seed))))

# APO state

variable time_step equal step
if $(v_cycle % 20 == 0) then &
	"include states/off" &
	"print ${time_step} append switches.log"

include states/apo
run $(round(-(v_stepsATP)*ln(random(0,1,v_seed))))

if $(v_cycle % 20 == 0) then &
	"include states/on"

#dump movie all atom ${output_steps} ${outputfile}
#dump_modify movie sort id pbc yes append yes

#run 0

# Increment cycle index
next cycle

# Re-enter loop
# LAMMPS will auto skip this when the cycle variable is exhausted
jump SELF main_loop

# The End

############################################################################################################
